# 1. | Лабораторная работа №1 студента Савченко Владислава
2.
a_.
(1 + (4*sqrt(5 - 2*sqrt(6)))/((nthroot(3, 4) + nthroot(2, 4))*(-nthroot(3, 4) + nthroot(2, 4)))) = -3
b_.
n := 6
x := 3
y := (sqrt(x^3 + n) + cos(|n*x - 1|))/nthroot(x^5 + 8*x + n, 4)
y = 1.34555
v_.
t := (sum(sin(i/n), i = 1 .. 10) + sum((i - n)/(i + n), i = 1 .. 5))/product((n + 3*i)/(n^2 + n*i - n), i = 1 .. 5)
t = 2003.82
3.
x := -2, -1.8 .. 2
y(x) := nthroot(2*exp(x) + 2^x + 1, 3) + ln(x)^5
x = [-2; -1.8; -1.6; -1.4; -1.2; -1; -0.8; -0.6; -0.4; -0.2; 0; 0.2; 0.4; 0.6; 0.8; 1; 1.2; 1.4; 1.6; 1.8; 2]
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y(x) = [306.036 + 160.675i; 267.48 + 200.77i; 219.89 + 238.292i; 161.354 + 271.118i; 89.4687 + 295.73i; 1.3076 + 306.02i; -106.233 + 290.62i; -234.272 + 226.181i; -369.536 + 56.7672i; -381.694 - 391.739i; -50862185 + 24143109i; -9.13661; 1.09796; 1.79834; 1.92973; 2.03574; 2.15015; 2.27769; 2.42949; 2.62017; 2.86434]
4.
A := [1, 2, 3; 8, 5, 4; 8, 9, 0]
B := [0, 1, 5; 6, 5, 14; 8, 5, 5]
V := [5; 2; 3]
C := A + B
d := |A|*|B|
g := transpose(V)*A*V
S := B*V
E := A^-1*C - B
q := max(A)
p := min(B)
q = 9
C = [1, 3, 8; 14, 10, 18; 16, 14, 5]
d = 3968
g = 388
S = [17; 82; 65]
p = 0
E = [1.85484, -0.483871, -3.68548; -5.87097, -3.90323, -14.6129; -8.37097, -4.90323, -2.3629]
5.
a := -π/2
b := π/2
integral(sin(2*t)^2*(2*t^3 - sqrt(2*t^2 + 1)), t = a .. b) = -2.38835
6.
x := -5, -4.8 .. 5
y := -5, -4.8 .. 5
f(x, y) := 3*x^2 + 3*y^2
y = [
    -5; -4.8; -4.6; -4.4; -4.2; -4; -3.8; -3.6; -3.4; -3.2
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]
x = [
    -5; -4.8; -4.6; -4.4; -4.2; -4; -3.8; -3.6; -3.4; -3.2
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]
# [component: inputs f]
