# Лабараторная работа №4
№1
A(n, m) :=
    z ← ((m - 1)*sqrt(m) - (n - 1)*sqrt(n))/(sqrt(m^3*n) + n*m + m^2 - m)
    return z
A(4, 5) = 0.0472136
A(10, 1000) = 0.0284605
№2
a := 2.6
b := -0.39
x := 0, 0.5 .. 7
R(x) :=
    (a + b)/(exp(x) + cos(x)) if x < 2.8
    if {
        x < 6
        x ≥ 2.8
    }
        (a + b)/(x + 1)
    exp(x) + sin(x) if x ≥ 6
R(x) = [1.105; 0.874796; 0.678209; 0.485455; 0.316941; 0.194177; 0.5525; 0.491111; 0.442; 0.401818; 0.368333; 0.34; 403.149; 665.357; 1097.29]
№3
i := 1, 1.2 .. 2
y := 2.92
x := 6.96*10^-11
i = [1; 1.2; 1.4; 1.6; 1.8; 2]
f(i) :=
    for t ∈ 1, 1.2 .. 2
        g(x) ← i + y if i < 1.5
    g(x) ← i + x^2 if i ≥ 1.5
    return g(x)
f(i) = [3.92; 4.12; 4.32; 1.6; 1.8; 2]
